ф1 := 0.335
ф6 := 1.555
ф2 := 1.05
ф7 := 4.55
ф3 := 3.225
ф8 := 3.25
ф4 := 3.72
ф9 := 2.6
ф5 := 2.005
ф10 := 0.225
Сф := ф1 + ф2 + ф3 + ф4 + ф5 + ф6 + ф7 + ф8 + ф9 + ф10 = 22.515
НВ := 295.7
Срф := 0.7
ГС := 2
ТЗ := 0.11*НВ = 32.527
Пэо := 3.5
ЭП := 0.09*НВ = 26.613
Пэр := 11.5
ТП := 0.11*НВ = 32.527
Фном := 1974
РП := 0.55*НВ*Срф = 113.845
Фэо := Фном*(1 - Пэо/100) = 1904.91
ВН := 0.14*НВ = 41.398
Фэр := Фном*(1 - Пэр/100) = 1746.99
Сумм := ТЗ + ЭП + ТП + РП + ВН = 246.91
Ср := Сумм/(1*20.56*8) = 1.50115
