Цед := 5704
N16 := 0
N17 := 10
N18 := 8
N19 := 6
N20 := 4
Р16 := Цед*N16 = 0
Р17 := Цед*N17 = 57040
Р18 := Цед*N18 = 45632
Р19 := Цед*N19 = 34224
Р20 := Цед*N20 = 22816
К16 := 32510
К17 := 0
К18 := 0
К19 := 0
К20 := 0
И16 := 0
И17 := 49600
И18 := И17*0.7 = 34720
И19 := И17*0.5 = 24800
И20 := И17*0.6 = 29760
ЧДП16 := Р16 - (К16 + И16) = -32510
ЧДП17 := Р17 - (К17 + И17) = 7440
ЧДП18 := Р18 - (К18 + И18) = 10912
ЧДП19 := Р19 - (К19 + И19) = 9424
ЧДП20 := Р20 - (К20 + И20) = -6944
Е := 0.12
А := К16/5 = 6502
а1 := 1
ЧДДП16 := ЧДП16*а1 = -32510
П1 := Р16 - И16 = 0
ЭИ16 := -К16 = -32510
а2 := 1/(1 + Е)^2 = 0.797194
ЧДДП17 := ЧДП17*а2 = 5931.12
П2 := Р17 - И17 - А/4 = 5814.5
ЭИ17 := ЭИ16 + ЧДДП17 = -26578.9
а3 := 1/(1 + Е)^3 = 0.71178
ЧДДП18 := ЧДП18*а3 = 7766.95
П3 := Р18 - И18 - А/4 = 9286.5
ЭИ18 := ЭИ17 + ЧДДП18 = -18811.9
а4 := 1/(1 + Е)^4 = 0.635518
ЧДДП19 := ЧДП19*а4 = 5989.12
П4 := Р19 - И19 - А/4 = 7798.5
ЭИ19 := ЭИ18 + ЧДДП19 = -12822.8
а5 := 1/(1 + Е)^5 = 0.567427
ЧДДП20 := ЧДП20*а5 = -3940.21
П5 := Р20 - И20 - А/4 = -8569.5
ЭИ20 := ЭИ19 + ЧДДП20 = -16763
